units              real
atom_style         full
timestep	   1.0
boundary	   p p p

pair_style         lj/cut/coul/long 12.0
kspace_style       pppm 1.0e-6

pair_modify        mix arithmetic
special_bonds      amber
neighbor           2.0 bin
neigh_modify       every 1 delay 0 check yes
